*HEADING
cubit(gpac/trunk/test/full_tests/AdvectionSim/ApertureSmall.inp): 03/06/2012: 16
version: 13.0
**
********************************** P A R T S **********************************
*PART, NAME=Part-Default
**
********************************** N O D E S **********************************
*NODE, NSET=ALLNODES
       1,    1.350000e+00,    3.090000e+00,    0.000000e+00
       2,    1.350000e+00,    0.000000e+00,    0.000000e+00
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**
********************************** E L E M E N T S ****************************
*ELEMENT, TYPE=C3D8R, ELSET=fracture1
       1,     527,     961,    1006,     557,     558,     963,    1051,     931
       2,     961,      33,      48,    1006,     963,      46,     480,    1051
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**
********************************** N O D E S E T S **********************************
*NSET, NSET=Xmin
      33,      47,      48,      49,      50,      51
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*NSET, NSET=Xmax
       1,       2,       3,       4,       5,       6
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*NSET, NSET=Ymin
       2,      33,      34,      35,      36,      37
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*NSET, NSET=Ymax
       1,      47,      78,      79,      80,      81
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*NSET, NSET=Zmin
       1,       2,       3,       4,       5,       6
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*NSET, NSET=Zmax
     481,     482,     483,     484,     485,     486
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**
********************************** P R O P E R T I E S ************************
*SOLID SECTION, ELSET=fracture1, MATERIAL=Default-Steel
**
*END PART
**
**
**
********************************** E N D   P A R T S **********************************
**
**
********************************** A S S E M B L Y ************************************
**
*ASSEMBLY, NAME=ASSEMBLY1
**
*INSTANCE, NAME=Part-Default_1, PART=Part-Default
*END INSTANCE
**
*END ASSEMBLY
**
**
**
*MATERIAL, NAME = Default-Steel
*ELASTIC, TYPE=ISOTROPIC
2.068000e+05, 2.900000e-01
*DENSITY
7.000000e-06
*CONDUCTIVITY,TYPE=ISO
4.500000e-02
*SPECIFIC HEAT
5.000000e+02
**
**
************************************** H I S T O R Y *************************************
**
*PREPRINT
**
**************************************** S T E P 1 ***************************************
*STEP,INC=100,NAME=Default Set
**
*STATIC
1, 1, 1e-05, 1
**
**
**
**
*END STEP
