*HEADING
cubit(l_tests/AdvectionSim/SurfaceData/Ohaaki/Ohaaki1Eighth.inp): 12/21/2011: 10
version: 13.0
**
********************************** P A R T S **********************************
*PART, NAME=Part-Default
**
********************************** N O D E S **********************************
*NODE, NSET=ALLNODES
       1,    1.840000e+00,    1.070000e+00,   -2.000000e-01
       2,    1.840000e+00,    3.500000e-01,   -2.000000e-01
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**
********************************** E L E M E N T S ****************************
*ELEMENT, TYPE=C3D8R, ELSET=Fracture_Floor
       1,      80,     129,     143,      86,      87,     131,     157,     123
       2,     129,       9,      17,     143,     131,      15,      64,     157
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*ELEMENT, TYPE=C3D8R, ELSET=Fracture_Roof
      99,     196,     249,     336,     218,     219,     325,     349,     283
     100,     249,     199,     237,     336,     325,     236,     324,     349
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**
********************************** N O D E S E T S **********************************
*NSET, NSET=Xmin_Floor
       9,      16,      17,      18,      19,      20
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*NSET, NSET=Xmax_Floor
       1,       2,       3,       4,       5,       6
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*NSET, NSET=Ymin_Floor
       2,       9,      10,      11,      12,      13
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*NSET, NSET=Ymax_Floor
       1,      16,      23,      24,      25,      26
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*NSET, NSET=Zmin_Floor
       1,       2,       3,       4,       5,       6
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*NSET, NSET=Zmax_Floor
      65,      66,      67,      68,      69,      70
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**
********************************** P R O P E R T I E S ************************
*SOLID SECTION, ELSET=Fracture_Floor, MATERIAL=Default-Steel
*SOLID SECTION, ELSET=Fracture_Roof, MATERIAL=Default-Steel
**
*END PART
**
**
**
********************************** E N D   P A R T S **********************************
**
**
********************************** A S S E M B L Y ************************************
**
*ASSEMBLY, NAME=ASSEMBLY1
**
*INSTANCE, NAME=Part-Default_1, PART=Part-Default
*END INSTANCE
**
*END ASSEMBLY
**
**
**
*MATERIAL, NAME = Default-Steel
*ELASTIC, TYPE=ISOTROPIC
2.068000e+05, 2.900000e-01
*DENSITY
7.000000e-06
*CONDUCTIVITY,TYPE=ISO
4.500000e-02
*SPECIFIC HEAT
5.000000e+02
**
**
************************************** H I S T O R Y *************************************
**
*PREPRINT
**
**************************************** S T E P 1 ***************************************
*STEP,INC=100,NAME=Default Set
**
*STATIC
1, 1, 1e-05, 1
**
**
**
**
*END STEP
